// SBML level 3 version 1

model Ca_CaM_sbml()
  // model units - substance: substance, time: time, volume: volume, area: area, length: length, extent: substance

  // Compartments:
  compartment kinetics_464_0_ = 1e-15 volume;

  // Species:
  species CaM_Ca4_473_0_ in kinetics_464_0_ = 0;
  // There is a LOT of this in the cell: upto 1% of total protein mass. (Alberts et al) Say 25 uM. Meyer et al Science 256 1199-1202 1992 refer to studies saying it is comparable to CaMK levels.
  species CaM_475_0_ in kinetics_464_0_ = 0.002;
  species CaM_Ca3_477_0_ in kinetics_464_0_ = 0;
  // This is the intermediate where the TR2 end (the high-affinity end) has bound the Ca but the TR1 end has not.
  species CaM_Ca2_479_0_ in kinetics_464_0_ = 0;
  // This is the intermediate where the TR2 end (the high-affinity end) has bound the Ca but the TR1 end has not.
  species CaM_Ca_481_0_ in kinetics_464_0_ = 0;
  species Ca_493_0_ in kinetics_464_0_ = 8e-5;
  species $Ca_input_495_0_ in kinetics_464_0_ = 0;
  species $Ca_ext_499_0_ in kinetics_464_0_ = 8e-5;

  // Reactions:
  // kinetics_464_0_ * CaM_Ca3_bind_Ca_483_0__Kf * CaM_Ca3_477_0_*Ca_493_0_-kinetics_464_0_ * CaM_Ca3_bind_Ca_483_0__Kb * CaM_Ca4_473_0_
  // Use K3 = 21.5 uM here from Stemmer and Klee table 3. kb/kf =21.5 * 6e5 so kf = 7.75e-7, kb = 10
  CaM_Ca3_bind_Ca_483_0_: CaM_Ca3_477_0_ + Ca_493_0_ -> CaM_Ca4_473_0_; kinetics_464_0_*CaM_Ca3_bind_Ca_483_0__Kf*CaM_Ca3_477_0_*Ca_493_0_ - kinetics_464_0_*CaM_Ca3_bind_Ca_483_0__Kb*CaM_Ca4_473_0_;
    CaM_Ca3_bind_Ca_483_0__Kf = 4299.18 litre_per_mmole_per_second; CaM_Ca3_bind_Ca_483_0__Kb = 10 per_second;
  // kinetics_464_0_ * CaM_bind_Ca_485_0__Kf * CaM_475_0_*Ca_493_0_-kinetics_464_0_ * CaM_bind_Ca_485_0__Kb * CaM_Ca_481_0_
  // Lets use the fast rate consts here. Since the rates are so different, I am not sure whether the order is relevant. These correspond to the TR2C fragment. We use the Martin et al rates here, plus the Drabicowski binding consts. All are scaled by 3X to cell temp. kf = 2e-10 kb = 72 Stemmer _and Klee: K1=.9, K2=1.1. Assume 1.0uM for both. kb/kf=3.6e11. If kb=72, kf = 2e-10 (Exactly the same !) 19 May 2006. Splitting the old CaM-TR2-bind-Ca reaction into two steps, each binding 1 Ca. This improves numerical stability and is conceptually better too. Overall rates are the same, so each kf and kb is the square root of the earlier ones. So kf = 1.125e-4, kb = 8.4853
  CaM_bind_Ca_485_0_: CaM_475_0_ + Ca_493_0_ -> CaM_Ca_481_0_; kinetics_464_0_*CaM_bind_Ca_485_0__Kf*CaM_475_0_*Ca_493_0_ - kinetics_464_0_*CaM_bind_Ca_485_0__Kb*CaM_Ca_481_0_;
    CaM_bind_Ca_485_0__Kf = 7295.4 litre_per_mmole_per_second; CaM_bind_Ca_485_0__Kb = 8.4853 per_second;
  // kinetics_464_0_ * CaM_Ca2_bind_Ca_487_0__Kf * CaM_Ca2_479_0_*Ca_493_0_-kinetics_464_0_ * CaM_Ca2_bind_Ca_487_0__Kb * CaM_Ca3_477_0_
  // K3 = 21.5, K4 = 2.8. Assuming that the K4 step happens first, we get kb/kf = 2.8 uM = 1.68e6 so kf =6e-6 assuming kb = 10
  CaM_Ca2_bind_Ca_487_0_: CaM_Ca2_479_0_ + Ca_493_0_ -> CaM_Ca3_477_0_; kinetics_464_0_*CaM_Ca2_bind_Ca_487_0__Kf*CaM_Ca2_479_0_*Ca_493_0_ - kinetics_464_0_*CaM_Ca2_bind_Ca_487_0__Kb*CaM_Ca3_477_0_;
    CaM_Ca2_bind_Ca_487_0__Kf = 4299.18 litre_per_mmole_per_second; CaM_Ca2_bind_Ca_487_0__Kb = 10 per_second;
  // kinetics_464_0_ * CaM_Ca_bind_Ca_489_0__Kf * CaM_Ca_481_0_*Ca_493_0_-kinetics_464_0_ * CaM_Ca_bind_Ca_489_0__Kb * CaM_Ca2_479_0_
  // Lets use the fast rate consts here. Since the rates are so different, I am not sure whether the order is relevant. These correspond to the TR2C fragment. We use the Martin et al rates here, plus the Drabicowski binding consts. All are scaled by 3X to cell temp. kf = 2e-10 kb = 72 Stemmer _and Klee: K1=.9, K2=1.1. Assume 1.0uM for both. kb/kf=3.6e11. If kb=72, kf = 2e-10 (Exactly the same !) 19 May 2006. Splitting the old CaM-TR2-bind-Ca reaction into two steps, each binding 1 Ca. This improves numerical stability and is conceptually better too. Overall rates are the same, so each kf and kb is the square root of the earlier ones. So kf = 1.125e-4, kb = 8.4853
  CaM_Ca_bind_Ca_489_0_: CaM_Ca_481_0_ + Ca_493_0_ -> CaM_Ca2_479_0_; kinetics_464_0_*CaM_Ca_bind_Ca_489_0__Kf*CaM_Ca_481_0_*Ca_493_0_ - kinetics_464_0_*CaM_Ca_bind_Ca_489_0__Kb*CaM_Ca2_479_0_;
    CaM_Ca_bind_Ca_489_0__Kf = 7295.4 litre_per_mmole_per_second; CaM_Ca_bind_Ca_489_0__Kb = 8.4853 per_second;
  // kinetics_464_0_ * Ca_stim_497_0__Kf * Ca_input_495_0_
  Ca_stim_497_0_: $Ca_input_495_0_ => Ca_493_0_; kinetics_464_0_*Ca_stim_497_0__Kf*Ca_input_495_0_;
    Ca_stim_497_0__Kf = 20 per_second;
  // kinetics_464_0_ * Ca_homeostasis_501_0__Kf * Ca_ext_499_0_-kinetics_464_0_ * Ca_homeostasis_501_0__Kb * Ca_493_0_
  Ca_homeostasis_501_0_: $Ca_ext_499_0_ -> Ca_493_0_; kinetics_464_0_*Ca_homeostasis_501_0__Kf*Ca_ext_499_0_ - kinetics_464_0_*Ca_homeostasis_501_0__Kb*Ca_493_0_;
    Ca_homeostasis_501_0__Kf = 0.5 per_second; Ca_homeostasis_501_0__Kb = 0.5 per_second;

  // Unit definitions:
  unit volume = litre;
  unit substance = 1e-3 mole;
  unit length = metre;
  unit area = metre^2;
  unit time = second;
  unit litre_per_mmole_per_second = litre / (1e-3 mole * second);
  unit per_second = 1 / second;
end
